// SBML level 3 version 1

model met13_pkpd_7()
  // PKPD model for clearance of substance.
  // Description
  // This model is a physiologically based pharmacokinetic model (PKPD) encoded in SBML format for the clearance of substances by the human liver.
  // The content of this model has been carefully created in a manual research effort.
  // This file has been created by Matthias Koenig.
  // Terms of use
  // Copyright © 2016 Matthias Koenig.
  // Redistribution and use of any part of this model, with or without modification, are permitted provided that the following conditions are met:
  // Redistributions of this SBML file must retain the above copyright notice, this list of conditions and the following disclaimer.
  // Redistributions in a different form must reproduce the above copyright notice, this list of conditions and the following disclaimer in the documentation and/or other materials provided with the distribution.
  // This model is distributed in the hope that it will be useful, but WITHOUT ANY WARRANTY; without even the implied warranty of MERCHANTABILITY or FITNESS FOR A PARTICULAR PURPOSE.
  // model units - substance: mg, time: h, volume: litre, area: m2, length: m, extent: mg

  // Compartments:
  compartment Vre; Vre has litre; Vre is "rest of body";
  compartment Vgu; Vgu has litre; Vgu is "gut";
  compartment Vki; Vki has litre; Vki is "kidney";
  compartment Vli; Vli has litre; Vli is "liver";
  compartment Vlu; Vlu has litre; Vlu is "lung";
  compartment Vsp; Vsp has litre; Vsp is "spleen";
  compartment Vve; Vve has litre; Vve is "venous blood";
  compartment Var; Var has litre; Var is "arterial blood";
  compartment Vpl; Vpl has litre; Vpl is "plasma";
  compartment Vplas_ven; Vplas_ven has litre; Vplas_ven is "venous plasma";
  compartment Vplas_art; Vplas_art has litre; Vplas_art is "arterial plasma";

  // Species:
  substanceOnly species Aar_apap_sul in Var = 0; Aar_apap_sul is "paracetamol sulphate (arterial blood)";
  substanceOnly species Asp_apap_sul in Vsp = 0; Asp_apap_sul is "paracetamol sulphate (spleen)";
  substanceOnly species Agu_apap_sul in Vgu = 0; Agu_apap_sul is "paracetamol sulphate (gut)";
  substanceOnly species Are_apap_sul in Vre = 0; Are_apap_sul is "paracetamol sulphate (rest)";
  substanceOnly species Aki_apap_sul in Vki = 0; Aki_apap_sul is "paracetamol sulphate (kidney)";
  substanceOnly species Alu_apap_sul in Vlu = 0; Alu_apap_sul is "paracetamol sulphate (lung)";
  substanceOnly species Ali_apap_sul in Vli = 0; Ali_apap_sul is "paracetamol sulphate (liver)";
  substanceOnly species Ave_apap_sul in Vve = IVDOSE_apap_sul; Ave_apap_sul is "paracetamol sulphate (venous blood)";
  substanceOnly species Aar_apap in Var = 0; Aar_apap is "paracetamol (arterial blood)";
  substanceOnly species Asp_apap in Vsp = 0; Asp_apap is "paracetamol (spleen)";
  substanceOnly species Agu_apap in Vgu = 0; Agu_apap is "paracetamol (gut)";
  substanceOnly species Are_apap in Vre = 0; Are_apap is "paracetamol (rest)";
  substanceOnly species Aki_apap in Vki = 0; Aki_apap is "paracetamol (kidney)";
  substanceOnly species Alu_apap in Vlu = 0; Alu_apap is "paracetamol (lung)";
  substanceOnly species Ali_apap in Vli = 0; Ali_apap is "paracetamol (liver)";
  substanceOnly species Ave_apap in Vve = IVDOSE_apap; Ave_apap is "paracetamol (venous blood)";
  substanceOnly species Aar_metc13 in Var = 0; Aar_metc13 is "C13-methacetin (arterial blood)";
  substanceOnly species Asp_metc13 in Vsp = 0; Asp_metc13 is "C13-methacetin (spleen)";
  substanceOnly species Agu_metc13 in Vgu = 0; Agu_metc13 is "C13-methacetin (gut)";
  substanceOnly species Are_metc13 in Vre = 0; Are_metc13 is "C13-methacetin (rest)";
  substanceOnly species Aki_metc13 in Vki = 0; Aki_metc13 is "C13-methacetin (kidney)";
  substanceOnly species Alu_metc13 in Vlu = 0; Alu_metc13 is "C13-methacetin (lung)";
  substanceOnly species Ali_metc13 in Vli = 0; Ali_metc13 is "C13-methacetin (liver)";
  substanceOnly species Ave_metc13 in Vve = IVDOSE_metc13; Ave_metc13 is "C13-methacetin (venous blood)";
  substanceOnly species Aar_apap_cys in Var = 0; Aar_apap_cys is "paracetamol cysteine (arterial blood)";
  substanceOnly species Asp_apap_cys in Vsp = 0; Asp_apap_cys is "paracetamol cysteine (spleen)";
  substanceOnly species Agu_apap_cys in Vgu = 0; Agu_apap_cys is "paracetamol cysteine (gut)";
  substanceOnly species Are_apap_cys in Vre = 0; Are_apap_cys is "paracetamol cysteine (rest)";
  substanceOnly species Aki_apap_cys in Vki = 0; Aki_apap_cys is "paracetamol cysteine (kidney)";
  substanceOnly species Alu_apap_cys in Vlu = 0; Alu_apap_cys is "paracetamol cysteine (lung)";
  substanceOnly species Ali_apap_cys in Vli = 0; Ali_apap_cys is "paracetamol cysteine (liver)";
  substanceOnly species Ave_apap_cys in Vve = IVDOSE_apap_cys; Ave_apap_cys is "paracetamol cysteine (venous blood)";
  substanceOnly species Aar_apap_glu in Var = 0; Aar_apap_glu is "paracetamol glucuronide (arterial blood)";
  substanceOnly species Asp_apap_glu in Vsp = 0; Asp_apap_glu is "paracetamol glucuronide (spleen)";
  substanceOnly species Agu_apap_glu in Vgu = 0; Agu_apap_glu is "paracetamol glucuronide (gut)";
  substanceOnly species Are_apap_glu in Vre = 0; Are_apap_glu is "paracetamol glucuronide (rest)";
  substanceOnly species Aki_apap_glu in Vki = 0; Aki_apap_glu is "paracetamol glucuronide (kidney)";
  substanceOnly species Alu_apap_glu in Vlu = 0; Alu_apap_glu is "paracetamol glucuronide (lung)";
  substanceOnly species Ali_apap_glu in Vli = 0; Ali_apap_glu is "paracetamol glucuronide (liver)";
  substanceOnly species Ave_apap_glu in Vve = IVDOSE_apap_glu; Ave_apap_glu is "paracetamol glucuronide (venous blood)";
  substanceOnly species Aar_co2c13 in Var = 0; Aar_co2c13 is "C13-CO2 (arterial blood)";
  substanceOnly species Asp_co2c13 in Vsp = 0; Asp_co2c13 is "C13-CO2 (spleen)";
  substanceOnly species Agu_co2c13 in Vgu = 0; Agu_co2c13 is "C13-CO2 (gut)";
  substanceOnly species Are_co2c13 in Vre = 0; Are_co2c13 is "C13-CO2 (rest)";
  substanceOnly species Aki_co2c13 in Vki = 0; Aki_co2c13 is "C13-CO2 (kidney)";
  substanceOnly species Alu_co2c13 in Vlu = 0; Alu_co2c13 is "C13-CO2 (lung)";
  substanceOnly species Ali_co2c13 in Vli = 0; Ali_co2c13 is "C13-CO2 (liver)";
  substanceOnly species Ave_co2c13 in Vve = IVDOSE_co2c13; Ave_co2c13 is "C13-CO2 (venous blood)";

  // Parameters:
  BW = 70 kg; BW is "body weight";
  CO = 108.33 ml_per_s; CO is "cardiac output [ml/s]";
  QC has litre_per_h; QC is "cardiac output [L/hr]";
  FVre = 0.9049 litre_per_kg; FVre is "rest of body fractional tissue volume";
  FVgu = 0.0171 litre_per_kg; FVgu is "gut fractional tissue volume";
  FVki = 0.0044 litre_per_kg; FVki is "kidney fractional tissue volume";
  FVli = 0.021 litre_per_kg; FVli is "liver fractional tissue volume";
  FVlu = 0.0076 litre_per_kg; FVlu is "lung fractional tissue volume";
  FVsp = 0.0026 litre_per_kg; FVsp is "spleen fractional tissue volume";
  FVve = 0.0514 litre_per_kg; FVve is "venous fractional tissue volume";
  FVar = 0.0257 litre_per_kg; FVar is "arterial fractional tissue volume";
  FVpl = 0.0424 litre_per_kg; FVpl is "plasma fractional tissue volume";
  FQgu = 0.146462 dimensionless; FQgu is "gut fractional tissue blood flow";
  FQki = 0.19 dimensionless; FQki is "kidney fractional tissue blood flow";
  FQh = 0.215385 dimensionless; FQh is "hepatic (venous side) fractional tissue blood flow";
  FQlu = 1 dimensionless; FQlu is "lung fractional tissue blood flow";
  FQsp = 0.017231 dimensionless; FQsp is "spleen fractional tissue blood flow";
  FQre = 0.594615 dimensionless; FQre is "rest of body fractional tissue blood flow";
  MPPGL = 45 mg_per_g; MPPGL is "mg microsomal protein per g liver";
  D_apap_sul = PODOSE_apap_sul; D_apap_sul has mg; D_apap_sul is "oral dose [mg]";
  IVDOSE_apap_sul = 0 mg; IVDOSE_apap_sul is "IV bolus dose [mg]";
  PODOSE_apap_sul = 0 mg; PODOSE_apap_sul is "oral bolus dose [mg]";
  Ka_apap_sul = 2.5 per_h; Ka_apap_sul is "Ka [1/hr] absorption";
  F_apap_sul = 1 dimensionless; F_apap_sul is "fraction absorbed";
  fup_apap_sul = 1 dimensionless; fup_apap_sul is "fraction unbound in plasma";
  BP_apap_sul = 1 dimensionless; BP_apap_sul is "blood to plasma ratio";
  fumic_apap_sul = 1 dimensionless; fumic_apap_sul is "fraction unbound in microsomes";
  CLrenal_apap_sul = 9.6 litre_per_h; CLrenal_apap_sul is "renal clearance [L/hr]";
  Kpsp_apap_sul = 1 dimensionless; Kpsp_apap_sul is "spleen plasma partition coefficient";
  Kpgu_apap_sul = 1 dimensionless; Kpgu_apap_sul is "gut plasma partition coefficient";
  Kpre_apap_sul = 0.8 dimensionless; Kpre_apap_sul is "rest plasma partition coefficient";
  Kpki_apap_sul = 1 dimensionless; Kpki_apap_sul is "kidney plasma partition coefficient";
  Kplu_apap_sul = 1 dimensionless; Kplu_apap_sul is "lung plasma partition coefficient";
  Kpli_apap_sul = 1 dimensionless; Kpli_apap_sul is "liver plasma partition coefficient";
  D_apap = PODOSE_apap; D_apap has mg; D_apap is "oral dose [mg]";
  IVDOSE_apap = 0 mg; IVDOSE_apap is "IV bolus dose [mg]";
  PODOSE_apap = 0 mg; PODOSE_apap is "oral bolus dose [mg]";
  Ka_apap = 2.5 per_h; Ka_apap is "Ka [1/hr] absorption";
  F_apap = 0.87 dimensionless; F_apap is "fraction absorbed";
  fup_apap = 1 dimensionless; fup_apap is "fraction unbound in plasma";
  BP_apap = 1 dimensionless; BP_apap is "blood to plasma ratio";
  fumic_apap = 1 dimensionless; fumic_apap is "fraction unbound in microsomes";
  CLrenal_apap = 0.714 litre_per_h; CLrenal_apap is "renal clearance [L/hr]";
  Kpsp_apap = 1 dimensionless; Kpsp_apap is "spleen plasma partition coefficient";
  Kpgu_apap = 1 dimensionless; Kpgu_apap is "gut plasma partition coefficient";
  Kpre_apap = 0.8 dimensionless; Kpre_apap is "rest plasma partition coefficient";
  Kpki_apap = 1 dimensionless; Kpki_apap is "kidney plasma partition coefficient";
  Kplu_apap = 1 dimensionless; Kplu_apap is "lung plasma partition coefficient";
  Kpli_apap = 1 dimensionless; Kpli_apap is "liver plasma partition coefficient";
  D_metc13 = PODOSE_metc13; D_metc13 has mg; D_metc13 is "oral dose [mg]";
  IVDOSE_metc13 = 100 mg; IVDOSE_metc13 is "IV bolus dose [mg]";
  PODOSE_metc13 = 0 mg; PODOSE_metc13 is "oral bolus dose [mg]";
  Ka_metc13 = 2.5 per_h; Ka_metc13 is "Ka [1/hr] absorption";
  F_metc13 = 1 dimensionless; F_metc13 is "fraction absorbed";
  fup_metc13 = 1 dimensionless; fup_metc13 is "fraction unbound in plasma";
  BP_metc13 = 1 dimensionless; BP_metc13 is "blood to plasma ratio";
  fumic_metc13 = 1 dimensionless; fumic_metc13 is "fraction unbound in microsomes";
  CLrenal_metc13 = 0 litre_per_h; CLrenal_metc13 is "renal clearance [L/hr]";
  Kpsp_metc13 = 1 dimensionless; Kpsp_metc13 is "spleen plasma partition coefficient";
  Kpgu_metc13 = 1 dimensionless; Kpgu_metc13 is "gut plasma partition coefficient";
  Kpre_metc13 = 0.3 dimensionless; Kpre_metc13 is "rest plasma partition coefficient";
  Kpki_metc13 = 1 dimensionless; Kpki_metc13 is "kidney plasma partition coefficient";
  Kplu_metc13 = 1 dimensionless; Kplu_metc13 is "lung plasma partition coefficient";
  Kpli_metc13 = 1 dimensionless; Kpli_metc13 is "liver plasma partition coefficient";
  D_apap_cys = PODOSE_apap_cys; D_apap_cys has mg; D_apap_cys is "oral dose [mg]";
  IVDOSE_apap_cys = 0 mg; IVDOSE_apap_cys is "IV bolus dose [mg]";
  PODOSE_apap_cys = 0 mg; PODOSE_apap_cys is "oral bolus dose [mg]";
  Ka_apap_cys = 2.5 per_h; Ka_apap_cys is "Ka [1/hr] absorption";
  F_apap_cys = 1 dimensionless; F_apap_cys is "fraction absorbed";
  fup_apap_cys = 1 dimensionless; fup_apap_cys is "fraction unbound in plasma";
  BP_apap_cys = 1 dimensionless; BP_apap_cys is "blood to plasma ratio";
  fumic_apap_cys = 1 dimensionless; fumic_apap_cys is "fraction unbound in microsomes";
  CLrenal_apap_cys = 24.96 litre_per_h; CLrenal_apap_cys is "renal clearance [L/hr]";
  Kpsp_apap_cys = 1 dimensionless; Kpsp_apap_cys is "spleen plasma partition coefficient";
  Kpgu_apap_cys = 1 dimensionless; Kpgu_apap_cys is "gut plasma partition coefficient";
  Kpre_apap_cys = 0.8 dimensionless; Kpre_apap_cys is "rest plasma partition coefficient";
  Kpki_apap_cys = 1 dimensionless; Kpki_apap_cys is "kidney plasma partition coefficient";
  Kplu_apap_cys = 1 dimensionless; Kplu_apap_cys is "lung plasma partition coefficient";
  Kpli_apap_cys = 1 dimensionless; Kpli_apap_cys is "liver plasma partition coefficient";
  D_apap_glu = PODOSE_apap_glu; D_apap_glu has mg; D_apap_glu is "oral dose [mg]";
  IVDOSE_apap_glu = 0 mg; IVDOSE_apap_glu is "IV bolus dose [mg]";
  PODOSE_apap_glu = 0 mg; PODOSE_apap_glu is "oral bolus dose [mg]";
  Ka_apap_glu = 2.5 per_h; Ka_apap_glu is "Ka [1/hr] absorption";
  F_apap_glu = 1 dimensionless; F_apap_glu is "fraction absorbed";
  fup_apap_glu = 1 dimensionless; fup_apap_glu is "fraction unbound in plasma";
  BP_apap_glu = 1 dimensionless; BP_apap_glu is "blood to plasma ratio";
  fumic_apap_glu = 1 dimensionless; fumic_apap_glu is "fraction unbound in microsomes";
  CLrenal_apap_glu = 8.4 litre_per_h; CLrenal_apap_glu is "renal clearance [L/hr]";
  Kpsp_apap_glu = 1 dimensionless; Kpsp_apap_glu is "spleen plasma partition coefficient";
  Kpgu_apap_glu = 1 dimensionless; Kpgu_apap_glu is "gut plasma partition coefficient";
  Kpre_apap_glu = 0.8 dimensionless; Kpre_apap_glu is "rest plasma partition coefficient";
  Kpki_apap_glu = 1 dimensionless; Kpki_apap_glu is "kidney plasma partition coefficient";
  Kplu_apap_glu = 1 dimensionless; Kplu_apap_glu is "lung plasma partition coefficient";
  Kpli_apap_glu = 1 dimensionless; Kpli_apap_glu is "liver plasma partition coefficient";
  D_co2c13 = PODOSE_co2c13; D_co2c13 has mg; D_co2c13 is "oral dose [mg]";
  IVDOSE_co2c13 = 0 mg; IVDOSE_co2c13 is "IV bolus dose [mg]";
  PODOSE_co2c13 = 0 mg; PODOSE_co2c13 is "oral bolus dose [mg]";
  Ka_co2c13 = 2 per_h; Ka_co2c13 is "Ka [1/hr] absorption";
  F_co2c13 = 1 dimensionless; F_co2c13 is "fraction absorbed";
  fup_co2c13 = 1 dimensionless; fup_co2c13 is "fraction unbound in plasma";
  BP_co2c13 = 1 dimensionless; BP_co2c13 is "blood to plasma ratio";
  fumic_co2c13 = 1 dimensionless; fumic_co2c13 is "fraction unbound in microsomes";
  CLrenal_co2c13 = 0 litre_per_h; CLrenal_co2c13 is "renal clearance [L/hr]";
  Kpsp_co2c13 = 1 dimensionless; Kpsp_co2c13 is "spleen plasma partition coefficient";
  Kpgu_co2c13 = 1 dimensionless; Kpgu_co2c13 is "gut plasma partition coefficient";
  Kpre_co2c13 = 0.5 dimensionless; Kpre_co2c13 is "rest plasma partition coefficient";
  Kpki_co2c13 = 1 dimensionless; Kpki_co2c13 is "kidney plasma partition coefficient";
  Kplu_co2c13 = 1 dimensionless; Kplu_co2c13 is "lung plasma partition coefficient";
  Kpli_co2c13 = 1 dimensionless; Kpli_co2c13 is "liver plasma partition coefficient";
  Qgu has litre_per_h; Qgu is "gut blood flow";
  Qki has litre_per_h; Qki is "kidney blood flow";
  Qh has litre_per_h; Qh is "hepatic (venous side) blood flow";
  Qha has litre_per_h; Qha is "hepatic artery blood flow";
  Qlu has litre_per_h; Qlu is "lung blood flow";
  Qsp has litre_per_h; Qsp is "spleen blood flow";
  Qre has litre_per_h; Qre is "rest of body blood flow";
  Abody_apap_sul has mg;
  Cpl_ve_apap_sul has mg_per_litre; Cpl_ve_apap_sul is "venous plasma concentration";
  Cli_free_apap_sul has mg_per_litre; Cli_free_apap_sul is "free liver concentration";
  Cki_free_apap_sul has mg_per_litre; Cki_free_apap_sul is "free kidney concentration";
  Car_apap_sul has mg_per_litre; Car_apap_sul is "Concentration arterial blood";
  Csp_apap_sul has mg_per_litre; Csp_apap_sul is "Concentration spleen";
  Cgu_apap_sul has mg_per_litre; Cgu_apap_sul is "Concentration gut";
  Cre_apap_sul has mg_per_litre; Cre_apap_sul is "Concentration rest";
  Cki_apap_sul has mg_per_litre; Cki_apap_sul is "Concentration kidney";
  Clu_apap_sul has mg_per_litre; Clu_apap_sul is "Concentration lung";
  Cli_apap_sul has mg_per_litre; Cli_apap_sul is "Concentration liver";
  Cve_apap_sul has mg_per_litre; Cve_apap_sul is "Concentration venous blood";
  Abody_apap has mg;
  Cpl_ve_apap has mg_per_litre; Cpl_ve_apap is "venous plasma concentration";
  Cli_free_apap has mg_per_litre; Cli_free_apap is "free liver concentration";
  Cki_free_apap has mg_per_litre; Cki_free_apap is "free kidney concentration";
  Car_apap has mg_per_litre; Car_apap is "Concentration arterial blood";
  Csp_apap has mg_per_litre; Csp_apap is "Concentration spleen";
  Cgu_apap has mg_per_litre; Cgu_apap is "Concentration gut";
  Cre_apap has mg_per_litre; Cre_apap is "Concentration rest";
  Cki_apap has mg_per_litre; Cki_apap is "Concentration kidney";
  Clu_apap has mg_per_litre; Clu_apap is "Concentration lung";
  Cli_apap has mg_per_litre; Cli_apap is "Concentration liver";
  Cve_apap has mg_per_litre; Cve_apap is "Concentration venous blood";
  Abody_metc13 has mg;
  Cpl_ve_metc13 has mg_per_litre; Cpl_ve_metc13 is "venous plasma concentration";
  Cli_free_metc13 has mg_per_litre; Cli_free_metc13 is "free liver concentration";
  Cki_free_metc13 has mg_per_litre; Cki_free_metc13 is "free kidney concentration";
  Car_metc13 has mg_per_litre; Car_metc13 is "Concentration arterial blood";
  Csp_metc13 has mg_per_litre; Csp_metc13 is "Concentration spleen";
  Cgu_metc13 has mg_per_litre; Cgu_metc13 is "Concentration gut";
  Cre_metc13 has mg_per_litre; Cre_metc13 is "Concentration rest";
  Cki_metc13 has mg_per_litre; Cki_metc13 is "Concentration kidney";
  Clu_metc13 has mg_per_litre; Clu_metc13 is "Concentration lung";
  Cli_metc13 has mg_per_litre; Cli_metc13 is "Concentration liver";
  Cve_metc13 has mg_per_litre; Cve_metc13 is "Concentration venous blood";
  Abody_apap_cys has mg;
  Cpl_ve_apap_cys has mg_per_litre; Cpl_ve_apap_cys is "venous plasma concentration";
  Cli_free_apap_cys has mg_per_litre; Cli_free_apap_cys is "free liver concentration";
  Cki_free_apap_cys has mg_per_litre; Cki_free_apap_cys is "free kidney concentration";
  Car_apap_cys has mg_per_litre; Car_apap_cys is "Concentration arterial blood";
  Csp_apap_cys has mg_per_litre; Csp_apap_cys is "Concentration spleen";
  Cgu_apap_cys has mg_per_litre; Cgu_apap_cys is "Concentration gut";
  Cre_apap_cys has mg_per_litre; Cre_apap_cys is "Concentration rest";
  Cki_apap_cys has mg_per_litre; Cki_apap_cys is "Concentration kidney";
  Clu_apap_cys has mg_per_litre; Clu_apap_cys is "Concentration lung";
  Cli_apap_cys has mg_per_litre; Cli_apap_cys is "Concentration liver";
  Cve_apap_cys has mg_per_litre; Cve_apap_cys is "Concentration venous blood";
  Abody_apap_glu has mg;
  Cpl_ve_apap_glu has mg_per_litre; Cpl_ve_apap_glu is "venous plasma concentration";
  Cli_free_apap_glu has mg_per_litre; Cli_free_apap_glu is "free liver concentration";
  Cki_free_apap_glu has mg_per_litre; Cki_free_apap_glu is "free kidney concentration";
  Car_apap_glu has mg_per_litre; Car_apap_glu is "Concentration arterial blood";
  Csp_apap_glu has mg_per_litre; Csp_apap_glu is "Concentration spleen";
  Cgu_apap_glu has mg_per_litre; Cgu_apap_glu is "Concentration gut";
  Cre_apap_glu has mg_per_litre; Cre_apap_glu is "Concentration rest";
  Cki_apap_glu has mg_per_litre; Cki_apap_glu is "Concentration kidney";
  Clu_apap_glu has mg_per_litre; Clu_apap_glu is "Concentration lung";
  Cli_apap_glu has mg_per_litre; Cli_apap_glu is "Concentration liver";
  Cve_apap_glu has mg_per_litre; Cve_apap_glu is "Concentration venous blood";
  Abody_co2c13 has mg;
  Cpl_ve_co2c13 has mg_per_litre; Cpl_ve_co2c13 is "venous plasma concentration";
  Cli_free_co2c13 has mg_per_litre; Cli_free_co2c13 is "free liver concentration";
  Cki_free_co2c13 has mg_per_litre; Cki_free_co2c13 is "free kidney concentration";
  Car_co2c13 has mg_per_litre; Car_co2c13 is "Concentration arterial blood";
  Csp_co2c13 has mg_per_litre; Csp_co2c13 is "Concentration spleen";
  Cgu_co2c13 has mg_per_litre; Cgu_co2c13 is "Concentration gut";
  Cre_co2c13 has mg_per_litre; Cre_co2c13 is "Concentration rest";
  Cki_co2c13 has mg_per_litre; Cki_co2c13 is "Concentration kidney";
  Clu_co2c13 has mg_per_litre; Clu_co2c13 is "Concentration lung";
  Cli_co2c13 has mg_per_litre; Cli_co2c13 is "Concentration liver";
  Cve_co2c13 has mg_per_litre; Cve_co2c13 is "Concentration venous blood";
  MET2APAP_HLM_CL = 20 mulitre_per_min_mg; MET2APAP_HLM_CL is "HLM apparent clearance by hepatic microsomes [mul/min/mg]";
  MET2APAP_Km = 80 mg_per_litre;
  MET2APAP_CLliv has litre_per_h; MET2APAP_CLliv is "liver clearance [l/hr]";
  APAPGLU_HLM_CL = 192 mulitre_per_min_mg; APAPGLU_HLM_CL is "HLM apparent clearance by hepatic microsomes [mul/min/mg]";
  APAPGLU_Km = 80 mg_per_litre;
  APAPGLU_CLliv has litre_per_h; APAPGLU_CLliv is "liver clearance [l/hr]";
  APAPSUL_HLM_CL = 80 mulitre_per_min_mg; APAPSUL_HLM_CL is "HLM apparent clearance by hepatic microsomes [mul/min/mg]";
  APAPSUL_Km = 80 mg_per_litre;
  APAPSUL_CLliv has litre_per_h; APAPSUL_CLliv is "liver clearance [l/hr]";
  APAPCYS_HLM_CL = 4 mulitre_per_min_mg; APAPCYS_HLM_CL is "HLM apparent clearance by hepatic microsomes [mul/min/mg]";
  APAPCYS_Km = 80 mg_per_litre;
  APAPCYS_CLliv has litre_per_h; APAPCYS_CLliv is "liver clearance [l/hr]";

  // Assignment rules:
  Vgu := BW*FVgu;
  Vki := BW*FVki;
  Vli := BW*FVli;
  Vlu := BW*FVlu;
  Vsp := BW*FVsp;
  Vve := BW*FVve;
  Var := BW*FVar;
  Vpl := BW*FVpl;
  Vre := BW*FVre;
  Vplas_ven := Vpl*Vve/(Vve + Var);
  Vplas_art := Vpl*Var/(Vve + Var);
  QC := CO/(1000 ml_per_litre)*3600 s_per_h;
  Qgu := QC*FQgu;
  Qki := QC*FQki;
  Qh := QC*FQh;
  Qha := Qh - Qgu - Qsp;
  Qlu := QC*FQlu;
  Qsp := QC*FQsp;
  Qre := QC*FQre;
  Abody_apap_sul := Aar_apap_sul + Agu_apap_sul + Aki_apap_sul + Ali_apap_sul + Alu_apap_sul + Asp_apap_sul + Are_apap_sul + Ave_apap_sul;
  Cpl_ve_apap_sul := Cve_apap_sul/BP_apap_sul;
  Cli_free_apap_sul := Cli_apap_sul*fup_apap_sul;
  Cki_free_apap_sul := Cki_apap_sul*fup_apap_sul;
  Car_apap_sul := Aar_apap_sul/Var;
  Csp_apap_sul := Asp_apap_sul/Vsp;
  Cgu_apap_sul := Agu_apap_sul/Vgu;
  Cre_apap_sul := Are_apap_sul/Vre;
  Cki_apap_sul := Aki_apap_sul/Vki;
  Clu_apap_sul := Alu_apap_sul/Vlu;
  Cli_apap_sul := Ali_apap_sul/Vli;
  Cve_apap_sul := Ave_apap_sul/Vve;
  Abody_apap := Aar_apap + Agu_apap + Aki_apap + Ali_apap + Alu_apap + Asp_apap + Are_apap + Ave_apap;
  Cpl_ve_apap := Cve_apap/BP_apap;
  Cli_free_apap := Cli_apap*fup_apap;
  Cki_free_apap := Cki_apap*fup_apap;
  Car_apap := Aar_apap/Var;
  Csp_apap := Asp_apap/Vsp;
  Cgu_apap := Agu_apap/Vgu;
  Cre_apap := Are_apap/Vre;
  Cki_apap := Aki_apap/Vki;
  Clu_apap := Alu_apap/Vlu;
  Cli_apap := Ali_apap/Vli;
  Cve_apap := Ave_apap/Vve;
  Abody_metc13 := Aar_metc13 + Agu_metc13 + Aki_metc13 + Ali_metc13 + Alu_metc13 + Asp_metc13 + Are_metc13 + Ave_metc13;
  Cpl_ve_metc13 := Cve_metc13/BP_metc13;
  Cli_free_metc13 := Cli_metc13*fup_metc13;
  Cki_free_metc13 := Cki_metc13*fup_metc13;
  Car_metc13 := Aar_metc13/Var;
  Csp_metc13 := Asp_metc13/Vsp;
  Cgu_metc13 := Agu_metc13/Vgu;
  Cre_metc13 := Are_metc13/Vre;
  Cki_metc13 := Aki_metc13/Vki;
  Clu_metc13 := Alu_metc13/Vlu;
  Cli_metc13 := Ali_metc13/Vli;
  Cve_metc13 := Ave_metc13/Vve;
  Abody_apap_cys := Aar_apap_cys + Agu_apap_cys + Aki_apap_cys + Ali_apap_cys + Alu_apap_cys + Asp_apap_cys + Are_apap_cys + Ave_apap_cys;
  Cpl_ve_apap_cys := Cve_apap_cys/BP_apap_cys;
  Cli_free_apap_cys := Cli_apap_cys*fup_apap_cys;
  Cki_free_apap_cys := Cki_apap_cys*fup_apap_cys;
  Car_apap_cys := Aar_apap_cys/Var;
  Csp_apap_cys := Asp_apap_cys/Vsp;
  Cgu_apap_cys := Agu_apap_cys/Vgu;
  Cre_apap_cys := Are_apap_cys/Vre;
  Cki_apap_cys := Aki_apap_cys/Vki;
  Clu_apap_cys := Alu_apap_cys/Vlu;
  Cli_apap_cys := Ali_apap_cys/Vli;
  Cve_apap_cys := Ave_apap_cys/Vve;
  Abody_apap_glu := Aar_apap_glu + Agu_apap_glu + Aki_apap_glu + Ali_apap_glu + Alu_apap_glu + Asp_apap_glu + Are_apap_glu + Ave_apap_glu;
  Cpl_ve_apap_glu := Cve_apap_glu/BP_apap_glu;
  Cli_free_apap_glu := Cli_apap_glu*fup_apap_glu;
  Cki_free_apap_glu := Cki_apap_glu*fup_apap_glu;
  Car_apap_glu := Aar_apap_glu/Var;
  Csp_apap_glu := Asp_apap_glu/Vsp;
  Cgu_apap_glu := Agu_apap_glu/Vgu;
  Cre_apap_glu := Are_apap_glu/Vre;
  Cki_apap_glu := Aki_apap_glu/Vki;
  Clu_apap_glu := Alu_apap_glu/Vlu;
  Cli_apap_glu := Ali_apap_glu/Vli;
  Cve_apap_glu := Ave_apap_glu/Vve;
  Abody_co2c13 := Aar_co2c13 + Agu_co2c13 + Aki_co2c13 + Ali_co2c13 + Alu_co2c13 + Asp_co2c13 + Are_co2c13 + Ave_co2c13;
  Cpl_ve_co2c13 := Cve_co2c13/BP_co2c13;
  Cli_free_co2c13 := Cli_co2c13*fup_co2c13;
  Cki_free_co2c13 := Cki_co2c13*fup_co2c13;
  Car_co2c13 := Aar_co2c13/Var;
  Csp_co2c13 := Asp_co2c13/Vsp;
  Cgu_co2c13 := Agu_co2c13/Vgu;
  Cre_co2c13 := Are_co2c13/Vre;
  Cki_co2c13 := Aki_co2c13/Vki;
  Clu_co2c13 := Alu_co2c13/Vlu;
  Cli_co2c13 := Ali_co2c13/Vli;
  Cve_co2c13 := Ave_co2c13/Vve;
  MET2APAP_CLliv := MET2APAP_HLM_CL/fumic_metc13*MPPGL*Vli*60 min_per_h/(1000 mulitre_per_g);
  APAPGLU_CLliv := APAPGLU_HLM_CL/fumic_apap_glu*MPPGL*Vli*60 min_per_h/(1000 mulitre_per_g);
  APAPSUL_CLliv := APAPSUL_HLM_CL/fumic_apap_sul*MPPGL*Vli*60 min_per_h/(1000 mulitre_per_g);
  APAPCYS_CLliv := APAPCYS_HLM_CL/fumic_apap_cys*MPPGL*Vli*60 min_per_h/(1000 mulitre_per_g);

  // Rate rules:
  D_apap_sul' = -Absorption_apap_sul;
  D_apap' = -Absorption_apap;
  D_metc13' = -Absorption_metc13;
  D_apap_cys' = -Absorption_apap_cys;
  D_apap_glu' = -Absorption_apap_glu;
  D_co2c13' = -Absorption_co2c13;

  // Reactions:
  MET2APAP: Ali_metc13 => Ali_apap + Ali_co2c13; MET2APAP_CLliv*1 mg_per_litre*(Cli_free_metc13/(Cli_free_metc13 + MET2APAP_Km)); MET2APAP is "metc13 -> apap + co2c13 (CYP1A2)";
  APAPGLU: Ali_apap => Ali_apap_glu; APAPGLU_CLliv*1 mg_per_litre*(Cli_free_apap/(Cli_free_apap + APAPGLU_Km)); APAPGLU is "apap -> apap_glu";
  APAPSUL: Ali_apap => Ali_apap_sul; APAPSUL_CLliv*1 mg_per_litre*(Cli_free_apap/(Cli_free_apap + APAPSUL_Km)); APAPSUL is "apap -> apap_sul";
  APAPCYS: Ali_apap => Ali_apap_cys; APAPCYS_CLliv*1 mg_per_litre*(Cli_free_apap/(Cli_free_apap + APAPCYS_Km)); APAPCYS is "apap -> apap_cys";
  Absorption_apap_sul: => Agu_apap_sul; Ka_apap_sul*D_apap_sul*F_apap_sul; Absorption_apap_sul is "absorption";
  vre_apap_sul: Aki_apap_sul => ; CLrenal_apap_sul*Cki_free_apap_sul;
  ve_lu_apap_sul: Ave_apap_sul => Alu_apap_sul; Qlu*Cve_apap_sul;
  lu_ar_apap_sul: Alu_apap_sul => Aar_apap_sul; Qlu*(Clu_apap_sul/Kplu_apap_sul)*BP_apap_sul;
  ar_re_apap_sul: Aar_apap_sul => Are_apap_sul; Qre*Car_apap_sul;
  re_ve_apap_sul: Are_apap_sul => Ave_apap_sul; Qre*(Cre_apap_sul/Kpre_apap_sul)*BP_apap_sul;
  ar_ki_apap_sul: Aar_apap_sul => Aki_apap_sul; Qki*Car_apap_sul;
  ki_ve_apap_sul: Aki_apap_sul => Ave_apap_sul; Qki*(Cki_apap_sul/Kpki_apap_sul)*BP_apap_sul;
  ar_gu_apap_sul: Aar_apap_sul => Agu_apap_sul; Qgu*Car_apap_sul;
  gu_li_apap_sul: Agu_apap_sul => Ali_apap_sul; Qgu*(Cgu_apap_sul/Kpgu_apap_sul)*BP_apap_sul;
  ar_sp_apap_sul: Aar_apap_sul => Asp_apap_sul; Qsp*Car_apap_sul;
  sp_li_apap_sul: Asp_apap_sul => Ali_apap_sul; Qsp*(Csp_apap_sul/Kpsp_apap_sul)*BP_apap_sul;
  ar_li_apap_sul: Aar_apap_sul => Ali_apap_sul; Qha*Car_apap_sul;
  li_ve_apap_sul: Ali_apap_sul => Ave_apap_sul; Qh*(Cli_apap_sul/Kpli_apap_sul)*BP_apap_sul;
  Absorption_apap: => Agu_apap; Ka_apap*D_apap*F_apap; Absorption_apap is "absorption";
  vre_apap: Aki_apap => ; CLrenal_apap*Cki_free_apap;
  ve_lu_apap: Ave_apap => Alu_apap; Qlu*Cve_apap;
  lu_ar_apap: Alu_apap => Aar_apap; Qlu*(Clu_apap/Kplu_apap)*BP_apap;
  ar_re_apap: Aar_apap => Are_apap; Qre*Car_apap;
  re_ve_apap: Are_apap => Ave_apap; Qre*(Cre_apap/Kpre_apap)*BP_apap;
  ar_ki_apap: Aar_apap => Aki_apap; Qki*Car_apap;
  ki_ve_apap: Aki_apap => Ave_apap; Qki*(Cki_apap/Kpki_apap)*BP_apap;
  ar_gu_apap: Aar_apap => Agu_apap; Qgu*Car_apap;
  gu_li_apap: Agu_apap => Ali_apap; Qgu*(Cgu_apap/Kpgu_apap)*BP_apap;
  ar_sp_apap: Aar_apap => Asp_apap; Qsp*Car_apap;
  sp_li_apap: Asp_apap => Ali_apap; Qsp*(Csp_apap/Kpsp_apap)*BP_apap;
  ar_li_apap: Aar_apap => Ali_apap; Qha*Car_apap;
  li_ve_apap: Ali_apap => Ave_apap; Qh*(Cli_apap/Kpli_apap)*BP_apap;
  Absorption_metc13: => Agu_metc13; Ka_metc13*D_metc13*F_metc13; Absorption_metc13 is "absorption";
  vre_metc13: Aki_metc13 => ; CLrenal_metc13*Cki_free_metc13;
  ve_lu_metc13: Ave_metc13 => Alu_metc13; Qlu*Cve_metc13;
  lu_ar_metc13: Alu_metc13 => Aar_metc13; Qlu*(Clu_metc13/Kplu_metc13)*BP_metc13;
  ar_re_metc13: Aar_metc13 => Are_metc13; Qre*Car_metc13;
  re_ve_metc13: Are_metc13 => Ave_metc13; Qre*(Cre_metc13/Kpre_metc13)*BP_metc13;
  ar_ki_metc13: Aar_metc13 => Aki_metc13; Qki*Car_metc13;
  ki_ve_metc13: Aki_metc13 => Ave_metc13; Qki*(Cki_metc13/Kpki_metc13)*BP_metc13;
  ar_gu_metc13: Aar_metc13 => Agu_metc13; Qgu*Car_metc13;
  gu_li_metc13: Agu_metc13 => Ali_metc13; Qgu*(Cgu_metc13/Kpgu_metc13)*BP_metc13;
  ar_sp_metc13: Aar_metc13 => Asp_metc13; Qsp*Car_metc13;
  sp_li_metc13: Asp_metc13 => Ali_metc13; Qsp*(Csp_metc13/Kpsp_metc13)*BP_metc13;
  ar_li_metc13: Aar_metc13 => Ali_metc13; Qha*Car_metc13;
  li_ve_metc13: Ali_metc13 => Ave_metc13; Qh*(Cli_metc13/Kpli_metc13)*BP_metc13;
  Absorption_apap_cys: => Agu_apap_cys; Ka_apap_cys*D_apap_cys*F_apap_cys; Absorption_apap_cys is "absorption";
  vre_apap_cys: Aki_apap_cys => ; CLrenal_apap_cys*Cki_free_apap_cys;
  ve_lu_apap_cys: Ave_apap_cys => Alu_apap_cys; Qlu*Cve_apap_cys;
  lu_ar_apap_cys: Alu_apap_cys => Aar_apap_cys; Qlu*(Clu_apap_cys/Kplu_apap_cys)*BP_apap_cys;
  ar_re_apap_cys: Aar_apap_cys => Are_apap_cys; Qre*Car_apap_cys;
  re_ve_apap_cys: Are_apap_cys => Ave_apap_cys; Qre*(Cre_apap_cys/Kpre_apap_cys)*BP_apap_cys;
  ar_ki_apap_cys: Aar_apap_cys => Aki_apap_cys; Qki*Car_apap_cys;
  ki_ve_apap_cys: Aki_apap_cys => Ave_apap_cys; Qki*(Cki_apap_cys/Kpki_apap_cys)*BP_apap_cys;
  ar_gu_apap_cys: Aar_apap_cys => Agu_apap_cys; Qgu*Car_apap_cys;
  gu_li_apap_cys: Agu_apap_cys => Ali_apap_cys; Qgu*(Cgu_apap_cys/Kpgu_apap_cys)*BP_apap_cys;
  ar_sp_apap_cys: Aar_apap_cys => Asp_apap_cys; Qsp*Car_apap_cys;
  sp_li_apap_cys: Asp_apap_cys => Ali_apap_cys; Qsp*(Csp_apap_cys/Kpsp_apap_cys)*BP_apap_cys;
  ar_li_apap_cys: Aar_apap_cys => Ali_apap_cys; Qha*Car_apap_cys;
  li_ve_apap_cys: Ali_apap_cys => Ave_apap_cys; Qh*(Cli_apap_cys/Kpli_apap_cys)*BP_apap_cys;
  Absorption_apap_glu: => Agu_apap_glu; Ka_apap_glu*D_apap_glu*F_apap_glu; Absorption_apap_glu is "absorption";
  vre_apap_glu: Aki_apap_glu => ; CLrenal_apap_glu*Cki_free_apap_glu;
  ve_lu_apap_glu: Ave_apap_glu => Alu_apap_glu; Qlu*Cve_apap_glu;
  lu_ar_apap_glu: Alu_apap_glu => Aar_apap_glu; Qlu*(Clu_apap_glu/Kplu_apap_glu)*BP_apap_glu;
  ar_re_apap_glu: Aar_apap_glu => Are_apap_glu; Qre*Car_apap_glu;
  re_ve_apap_glu: Are_apap_glu => Ave_apap_glu; Qre*(Cre_apap_glu/Kpre_apap_glu)*BP_apap_glu;
  ar_ki_apap_glu: Aar_apap_glu => Aki_apap_glu; Qki*Car_apap_glu;
  ki_ve_apap_glu: Aki_apap_glu => Ave_apap_glu; Qki*(Cki_apap_glu/Kpki_apap_glu)*BP_apap_glu;
  ar_gu_apap_glu: Aar_apap_glu => Agu_apap_glu; Qgu*Car_apap_glu;
  gu_li_apap_glu: Agu_apap_glu => Ali_apap_glu; Qgu*(Cgu_apap_glu/Kpgu_apap_glu)*BP_apap_glu;
  ar_sp_apap_glu: Aar_apap_glu => Asp_apap_glu; Qsp*Car_apap_glu;
  sp_li_apap_glu: Asp_apap_glu => Ali_apap_glu; Qsp*(Csp_apap_glu/Kpsp_apap_glu)*BP_apap_glu;
  ar_li_apap_glu: Aar_apap_glu => Ali_apap_glu; Qha*Car_apap_glu;
  li_ve_apap_glu: Ali_apap_glu => Ave_apap_glu; Qh*(Cli_apap_glu/Kpli_apap_glu)*BP_apap_glu;
  Absorption_co2c13: => Agu_co2c13; Ka_co2c13*D_co2c13*F_co2c13; Absorption_co2c13 is "absorption";
  vre_co2c13: Aki_co2c13 => ; CLrenal_co2c13*Cki_free_co2c13;
  ve_lu_co2c13: Ave_co2c13 => Alu_co2c13; Qlu*Cve_co2c13;
  lu_ar_co2c13: Alu_co2c13 => Aar_co2c13; Qlu*(Clu_co2c13/Kplu_co2c13)*BP_co2c13;
  ar_re_co2c13: Aar_co2c13 => Are_co2c13; Qre*Car_co2c13;
  re_ve_co2c13: Are_co2c13 => Ave_co2c13; Qre*(Cre_co2c13/Kpre_co2c13)*BP_co2c13;
  ar_ki_co2c13: Aar_co2c13 => Aki_co2c13; Qki*Car_co2c13;
  ki_ve_co2c13: Aki_co2c13 => Ave_co2c13; Qki*(Cki_co2c13/Kpki_co2c13)*BP_co2c13;
  ar_gu_co2c13: Aar_co2c13 => Agu_co2c13; Qgu*Car_co2c13;
  gu_li_co2c13: Agu_co2c13 => Ali_co2c13; Qgu*(Cgu_co2c13/Kpgu_co2c13)*BP_co2c13;
  ar_sp_co2c13: Aar_co2c13 => Asp_co2c13; Qsp*Car_co2c13;
  sp_li_co2c13: Asp_co2c13 => Ali_co2c13; Qsp*(Csp_co2c13/Kpsp_co2c13)*BP_co2c13;
  ar_li_co2c13: Aar_co2c13 => Ali_co2c13; Qha*Car_co2c13;
  li_ve_co2c13: Ali_co2c13 => Ave_co2c13; Qh*(Cli_co2c13/Kpli_co2c13)*BP_co2c13;

  // Unit definitions:
  unit h = 3600 second;
  unit kg = 1000 gram;
  unit m = metre;
  unit m2 = metre^2;
  unit per_h = 1 / (3600 second);
  unit mg = 1e-3 gram;
  unit mg_per_litre = 1e-3 gram / litre;
  unit mg_per_g = 1e-3 gram / gram;
  unit mg_per_h = 1e-3 gram / (3600 second);
  unit litre_per_h = litre / (3600 second);
  unit litre_per_kg = litre / (1000 gram);
  unit mulitre_per_min_mg = 1e-6 litre / (60 second * 1e-3 gram);
  unit ml_per_s = 1e-3 litre / second;
  unit s_per_h = second / (3600 second);
  unit min_per_h = 60 second / (3600 second);
  unit ml_per_litre = 1e-3 litre / litre;
  unit mulitre_per_g = 1e-6 litre / gram;
end
