// SBML level 3 version 1

function max(x, y)
  piecewise(x, x > y, y);
end

function min(x, y)
  piecewise(x, x < y, y);
end

model limax_pkpd_37()
  // PKPD model for methacetin based liver function tests.
  // Description
  // This model is a physiological pharmacokinetic/pharmacodynamics model (PKPD) for the absorption, distribution, metabolism and elimination of methacetin, bicarbonate and paracetamol encoded in SBML format.
  // The content of this model has been carefully created in a manual research effort.
  // This file has been created by Matthias Koenig.
  // Terms of use
  // Copyright © 2018 Matthias Koenig.
  // Redistribution and use of any part of this model, with or without modification, are permitted provided that the following conditions are met:
  // Redistributions of this SBML file must retain the above copyright notice, this list of conditions and the following disclaimer.
  // Redistributions in a different form must reproduce the above copyright notice, this list of conditions and the following disclaimer in the documentation and/or other materials provided with the distribution.
  // This model is distributed in the hope that it will be useful, but WITHOUT ANY WARRANTY; without even the implied warranty of MERCHANTABILITY or FITNESS FOR A PARTICULAR PURPOSE.
  // model units - substance: mmole, time: h, volume: litre, area: m2, length: m, extent: mmole

  // Compartments:
  compartment Vre; Vre has litre;
  compartment Vbo; Vbo has litre;
  compartment Vhe; Vhe has litre;
  compartment Vgu; Vgu has litre;
  compartment Vki; Vki has litre;
  compartment Vli; Vli has litre;
  compartment Vlu; Vlu has litre;
  compartment Vsp; Vsp has litre;
  compartment Vve; Vve has litre;
  compartment Var; Var has litre;
  compartment Vpl; Vpl has litre;
  compartment Vplas_ven; Vplas_ven has litre;
  compartment Vplas_art; Vplas_art has litre;
  compartment Vbreath = 1 litre;
  compartment Vurine = 1 litre;

  // Species:
  substanceOnly species Ahe_co2c13 in Vhe = 0;
  substanceOnly species Agu_co2c13 in Vgu = 0;
  substanceOnly species Are_co2c13 in Vre = 0;
  substanceOnly species Aki_co2c13 in Vki = 0;
  substanceOnly species Asp_co2c13 in Vsp = 0;
  substanceOnly species Ali_co2c13 in Vli = 0;
  substanceOnly species Ave_co2c13 in Vve = 0;
  substanceOnly species Aar_co2c13 in Var = 0;
  substanceOnly species Abo_co2c13 in Vbo = 0;
  substanceOnly species Alu_co2c13 in Vlu = 0;
  substanceOnly species Aurine_co2c13 in Vurine = 0;
  substanceOnly species Ahe_metc13 in Vhe = 0;
  substanceOnly species Agu_metc13 in Vgu = 0;
  substanceOnly species Are_metc13 in Vre = 0;
  substanceOnly species Aki_metc13 in Vki = 0;
  substanceOnly species Asp_metc13 in Vsp = 0;
  substanceOnly species Ali_metc13 in Vli = 0;
  substanceOnly species Ave_metc13 in Vve = 0;
  substanceOnly species Aar_metc13 in Var = 0;
  substanceOnly species Abo_metc13 in Vbo = 0;
  substanceOnly species Alu_metc13 in Vlu = 0;
  substanceOnly species Aurine_metc13 in Vurine = 0;
  substanceOnly species Ahe_apap in Vhe = 0;
  substanceOnly species Agu_apap in Vgu = 0;
  substanceOnly species Are_apap in Vre = 0;
  substanceOnly species Aki_apap in Vki = 0;
  substanceOnly species Asp_apap in Vsp = 0;
  substanceOnly species Ali_apap in Vli = 0;
  substanceOnly species Ave_apap in Vve = 0;
  substanceOnly species Aar_apap in Var = 0;
  substanceOnly species Abo_apap in Vbo = 0;
  substanceOnly species Alu_apap in Vlu = 0;
  substanceOnly species Aurine_apap in Vurine = 0;
  substanceOnly species Abreath_co2c13 in Vbreath = 0;
  substanceOnly species Abo_co2c13_fix in Vbo = 0;

  // Parameters:
  BW = 75 kg;
  HEIGHT = 170 cm;
  HR = 70 per_min;
  HRrest = 70 per_min;
  BSA has m2;
  COBW = 1.548 ml_per_skg;
  CO has ml_per_s;
  QC has litre_per_h;
  COHRI = 150 ml;
  FVre has litre_per_kg;
  FVbo = 0.0856 litre_per_kg;
  FVhe = 0.0047 litre_per_kg;
  FVgu = 0.0171 litre_per_kg;
  FVki = 0.0044 litre_per_kg;
  FVli = 0.021 litre_per_kg;
  FVlu = 0.0076 litre_per_kg;
  FVsp = 0.0026 litre_per_kg;
  FVve = 0.0514 litre_per_kg;
  FVar = 0.0257 litre_per_kg;
  FVpl = 0.0424 litre_per_kg;
  FQre has dimensionless;
  FQbo = 0.05 dimensionless;
  FQhe = 0.04 dimensionless;
  FQgu = 0.146 dimensionless;
  FQki = 0.19 dimensionless;
  FQh = 0.215 dimensionless;
  FQlu = 1 dimensionless;
  FQsp = 0.017 dimensionless;
  F_PAR = 0.85 dimensionless;
  MPPGL = 45 mg_per_g;
  KLU_EXCO2 = 1.2 per_min;
  KBO_FIXCO2 = 0.1 per_min;
  KBO_RELCO2 = 0.0001 per_min;
  KBO_MAXCO2 = 0.2 mM;
  P_CO2BSA = 300 mmole_per_hm2;
  R_PDB = 0.01123 dimensionless;
  Mr_co2c13 = 62.02 g_per_mole;
  D_co2c13 = PODOSE_co2c13; D_co2c13 has mg;
  DIV_co2c13 = IVDOSE_co2c13; DIV_co2c13 has mg;
  IVDOSE_co2c13 = 0 mg;
  PODOSE_co2c13 = 0 mg;
  Ka_co2c13 = 8 per_h;
  F_co2c13 = 1 dimensionless;
  ti_co2c13 = 10 s;
  Ki_co2c13 has per_h;
  Ri_co2c13 = 0 mg_per_min;
  cum_dose_co2c13 = 0 mg;
  fup_co2c13 = 1 dimensionless;
  BP_co2c13 = 1 dimensionless;
  fumic_co2c13 = 1 dimensionless;
  CLrenal_co2c13 = 0 litre_per_h;
  Kphe_co2c13 = 1 dimensionless;
  Kpgu_co2c13 = 1 dimensionless;
  Kpre_co2c13 = 1 dimensionless;
  Kpki_co2c13 = 1 dimensionless;
  Kpsp_co2c13 = 1 dimensionless;
  Kpli_co2c13 = 1 dimensionless;
  Kpbo_co2c13 = 1 dimensionless;
  Kplu_co2c13 = 1 dimensionless;
  Mr_metc13 = 165.19 g_per_mole;
  D_metc13 = PODOSE_metc13; D_metc13 has mg;
  DIV_metc13 = IVDOSE_metc13; DIV_metc13 has mg;
  IVDOSE_metc13 = 0 mg;
  PODOSE_metc13 = 0 mg;
  Ka_metc13 = 4 per_h;
  F_metc13 = 1 dimensionless;
  ti_metc13 = 10 s;
  Ki_metc13 has per_h;
  Ri_metc13 = 0 mg_per_min;
  cum_dose_metc13 = 0 mg;
  fup_metc13 = 1 dimensionless;
  BP_metc13 = 1 dimensionless;
  fumic_metc13 = 1 dimensionless;
  CLrenal_metc13 = 10 litre_per_h;
  Kphe_metc13 = 1 dimensionless;
  Kpgu_metc13 = 1 dimensionless;
  Kpre_metc13 = 0.2 dimensionless;
  Kpki_metc13 = 1 dimensionless;
  Kpsp_metc13 = 1 dimensionless;
  Kpli_metc13 = 1 dimensionless;
  Kpbo_metc13 = 1 dimensionless;
  Kplu_metc13 = 1 dimensionless;
  Mr_apap = 151.16 g_per_mole;
  D_apap = PODOSE_apap; D_apap has mg;
  DIV_apap = IVDOSE_apap; DIV_apap has mg;
  IVDOSE_apap = 0 mg;
  PODOSE_apap = 0 mg;
  Ka_apap = 2.5 per_h;
  F_apap = 0.87 dimensionless;
  ti_apap = 10 s;
  Ki_apap has per_h;
  Ri_apap = 0 mg_per_min;
  cum_dose_apap = 0 mg;
  fup_apap = 1 dimensionless;
  BP_apap = 1 dimensionless;
  fumic_apap = 1 dimensionless;
  CLrenal_apap = 0.714 litre_per_h;
  Kphe_apap = 1 dimensionless;
  Kpgu_apap = 1 dimensionless;
  Kpre_apap = 0.8 dimensionless;
  Kpki_apap = 1 dimensionless;
  Kpsp_apap = 1 dimensionless;
  Kpli_apap = 1 dimensionless;
  Kpbo_apap = 1 dimensionless;
  Kplu_apap = 1 dimensionless;
  P_CO2 has mmole_per_min;
  P_CO2c13 has mmole_per_min;
  P_CO2c12 has mmole_per_min;
  P_CO2R has dimensionless;
  P_CO2Fc13 has dimensionless;
  DOB has dimensionless;
  Qbo has litre_per_h;
  Qhe has litre_per_h;
  Qgu has litre_per_h;
  Qki has litre_per_h;
  Qh has litre_per_h;
  Qha has litre_per_h;
  Qlu has litre_per_h;
  Qsp has litre_per_h;
  Qre has litre_per_h;
  Xbody_co2c13 has mg;
  Cpl_ve_co2c13 has mM;
  Cli_free_co2c13 has mM;
  Cki_free_co2c13 has mM;
  Che_co2c13 has mM;
  Xhe_co2c13 has mg;
  Mhe_co2c13 has mg_per_litre;
  Cgu_co2c13 has mM;
  Xgu_co2c13 has mg;
  Mgu_co2c13 has mg_per_litre;
  Cre_co2c13 has mM;
  Xre_co2c13 has mg;
  Mre_co2c13 has mg_per_litre;
  Cki_co2c13 has mM;
  Xki_co2c13 has mg;
  Mki_co2c13 has mg_per_litre;
  Csp_co2c13 has mM;
  Xsp_co2c13 has mg;
  Msp_co2c13 has mg_per_litre;
  Cli_co2c13 has mM;
  Xli_co2c13 has mg;
  Mli_co2c13 has mg_per_litre;
  Cve_co2c13 has mM;
  Xve_co2c13 has mg;
  Mve_co2c13 has mg_per_litre;
  Car_co2c13 has mM;
  Xar_co2c13 has mg;
  Mar_co2c13 has mg_per_litre;
  Cbo_co2c13 has mM;
  Xbo_co2c13 has mg;
  Mbo_co2c13 has mg_per_litre;
  Clu_co2c13 has mM;
  Xlu_co2c13 has mg;
  Mlu_co2c13 has mg_per_litre;
  Xurine_co2c13 has mg;
  Xbody_metc13 has mg;
  Cpl_ve_metc13 has mM;
  Cli_free_metc13 has mM;
  Cki_free_metc13 has mM;
  Che_metc13 has mM;
  Xhe_metc13 has mg;
  Mhe_metc13 has mg_per_litre;
  Cgu_metc13 has mM;
  Xgu_metc13 has mg;
  Mgu_metc13 has mg_per_litre;
  Cre_metc13 has mM;
  Xre_metc13 has mg;
  Mre_metc13 has mg_per_litre;
  Cki_metc13 has mM;
  Xki_metc13 has mg;
  Mki_metc13 has mg_per_litre;
  Csp_metc13 has mM;
  Xsp_metc13 has mg;
  Msp_metc13 has mg_per_litre;
  Cli_metc13 has mM;
  Xli_metc13 has mg;
  Mli_metc13 has mg_per_litre;
  Cve_metc13 has mM;
  Xve_metc13 has mg;
  Mve_metc13 has mg_per_litre;
  Car_metc13 has mM;
  Xar_metc13 has mg;
  Mar_metc13 has mg_per_litre;
  Cbo_metc13 has mM;
  Xbo_metc13 has mg;
  Mbo_metc13 has mg_per_litre;
  Clu_metc13 has mM;
  Xlu_metc13 has mg;
  Mlu_metc13 has mg_per_litre;
  Xurine_metc13 has mg;
  Xbody_apap has mg;
  Cpl_ve_apap has mM;
  Cli_free_apap has mM;
  Cki_free_apap has mM;
  Che_apap has mM;
  Xhe_apap has mg;
  Mhe_apap has mg_per_litre;
  Cgu_apap has mM;
  Xgu_apap has mg;
  Mgu_apap has mg_per_litre;
  Cre_apap has mM;
  Xre_apap has mg;
  Mre_apap has mg_per_litre;
  Cki_apap has mM;
  Xki_apap has mg;
  Mki_apap has mg_per_litre;
  Csp_apap has mM;
  Xsp_apap has mg;
  Msp_apap has mg_per_litre;
  Cli_apap has mM;
  Xli_apap has mg;
  Mli_apap has mg_per_litre;
  Cve_apap has mM;
  Xve_apap has mg;
  Mve_apap has mg_per_litre;
  Car_apap has mM;
  Xar_apap has mg;
  Mar_apap has mg_per_litre;
  Cbo_apap has mM;
  Xbo_apap has mg;
  Mbo_apap has mg_per_litre;
  Clu_apap has mM;
  Xlu_apap has mg;
  Mlu_apap has mg_per_litre;
  Xurine_apap has mg;
  Xbreath_co2c13 has mg;
  Cbo_co2c13_fix has mM;
  Xbo_co2c13_fix has mg;
  CYP1A2MET_CL = 1.5 mulitre_per_min_mg;
  CYP1A2MET_Km_met = 0.02 mM;
  CYP1A2MET_CLliv has litre_per_h;
  CO2FIX_HLM_CL = 1.5 mulitre_per_min_mg;
  CO2FIX_Km_co2 = 0.2 mM;
  CO2FIX_CLliv has litre_per_h;
  APAPD_HLM_CL = 2.5 mulitre_per_min_mg;
  APAPD_Km_apap = 0.5 mM;
  APAPD_CLliv has litre_per_h;

  // Assignment rules:
  FVre := 1 litre_per_kg - (FVbo + FVhe + FVgu + FVki + FVli + FVlu + FVsp + FVve + FVar + FVpl);
  FQre := 1 - (FQbo + FQhe + FQgu + FQki + FQh + FQsp);
  BSA := 0.024265 m2*(BW/(1 kg))^0.5378*(HEIGHT/(1 cm))^0.3964;
  CO := BW*COBW + (HR - HRrest)*COHRI/(60 s_per_min);
  QC := CO/(1000 ml_per_litre)*3600 s_per_h;
  P_CO2 := BSA*P_CO2BSA/(60 min_per_h);
  P_CO2c13 := R_PDB/(1 + R_PDB)*P_CO2 + Exhalation_co2c13/(60 min_per_h);
  P_CO2c12 := 1/(1 + R_PDB)*P_CO2;
  P_CO2R := P_CO2c13/P_CO2c12;
  P_CO2Fc13 := P_CO2c13/(P_CO2c12 + P_CO2c13);
  DOB := (P_CO2c13/P_CO2c12 - R_PDB)/R_PDB*1000;
  Vbo := BW*FVbo;
  Vhe := BW*FVhe;
  Vgu := BW*FVgu;
  Vki := BW*FVki;
  Vli := BW*FVli;
  Vlu := BW*FVlu;
  Vsp := BW*FVsp;
  Vve := BW*FVve;
  Var := BW*FVar;
  Vpl := BW*FVpl;
  Vre := BW*FVre;
  Vplas_ven := Vpl*Vve/(Vve + Var);
  Vplas_art := Vpl*Var/(Vve + Var);
  Qbo := QC*FQbo;
  Qhe := QC*FQhe;
  Qgu := QC*FQgu;
  Qki := QC*FQki;
  Qh := QC*FQh;
  Qha := Qh - Qgu - Qsp;
  Qlu := QC*FQlu;
  Qsp := QC*FQsp;
  Qre := QC*FQre;
  Xbody_co2c13 := Xar_co2c13 + Xbo_co2c13 + Xhe_co2c13 + Xgu_co2c13 + Xki_co2c13 + Xli_co2c13 + Xlu_co2c13 + Xsp_co2c13 + Xre_co2c13 + Xve_co2c13;
  Cpl_ve_co2c13 := Cve_co2c13/BP_co2c13;
  Cli_free_co2c13 := Cli_co2c13*fup_co2c13;
  Cki_free_co2c13 := Cki_co2c13*fup_co2c13;
  Ki_co2c13 := 1.386/ti_co2c13*3600 s_per_h;
  Che_co2c13 := Ahe_co2c13/Vhe;
  Xhe_co2c13 := Ahe_co2c13*Mr_co2c13;
  Mhe_co2c13 := Ahe_co2c13/Vhe*Mr_co2c13;
  Cgu_co2c13 := Agu_co2c13/Vgu;
  Xgu_co2c13 := Agu_co2c13*Mr_co2c13;
  Mgu_co2c13 := Agu_co2c13/Vgu*Mr_co2c13;
  Cre_co2c13 := Are_co2c13/Vre;
  Xre_co2c13 := Are_co2c13*Mr_co2c13;
  Mre_co2c13 := Are_co2c13/Vre*Mr_co2c13;
  Cki_co2c13 := Aki_co2c13/Vki;
  Xki_co2c13 := Aki_co2c13*Mr_co2c13;
  Mki_co2c13 := Aki_co2c13/Vki*Mr_co2c13;
  Csp_co2c13 := Asp_co2c13/Vsp;
  Xsp_co2c13 := Asp_co2c13*Mr_co2c13;
  Msp_co2c13 := Asp_co2c13/Vsp*Mr_co2c13;
  Cli_co2c13 := Ali_co2c13/Vli;
  Xli_co2c13 := Ali_co2c13*Mr_co2c13;
  Mli_co2c13 := Ali_co2c13/Vli*Mr_co2c13;
  Cve_co2c13 := Ave_co2c13/Vve;
  Xve_co2c13 := Ave_co2c13*Mr_co2c13;
  Mve_co2c13 := Ave_co2c13/Vve*Mr_co2c13;
  Car_co2c13 := Aar_co2c13/Var;
  Xar_co2c13 := Aar_co2c13*Mr_co2c13;
  Mar_co2c13 := Aar_co2c13/Var*Mr_co2c13;
  Cbo_co2c13 := Abo_co2c13/Vbo;
  Xbo_co2c13 := Abo_co2c13*Mr_co2c13;
  Mbo_co2c13 := Abo_co2c13/Vbo*Mr_co2c13;
  Clu_co2c13 := Alu_co2c13/Vlu;
  Xlu_co2c13 := Alu_co2c13*Mr_co2c13;
  Mlu_co2c13 := Alu_co2c13/Vlu*Mr_co2c13;
  Xurine_co2c13 := Aurine_co2c13*Mr_co2c13;
  Xbody_metc13 := Xar_metc13 + Xbo_metc13 + Xhe_metc13 + Xgu_metc13 + Xki_metc13 + Xli_metc13 + Xlu_metc13 + Xsp_metc13 + Xre_metc13 + Xve_metc13;
  Cpl_ve_metc13 := Cve_metc13/BP_metc13;
  Cli_free_metc13 := Cli_metc13*fup_metc13;
  Cki_free_metc13 := Cki_metc13*fup_metc13;
  Ki_metc13 := 1.386/ti_metc13*3600 s_per_h;
  Che_metc13 := Ahe_metc13/Vhe;
  Xhe_metc13 := Ahe_metc13*Mr_metc13;
  Mhe_metc13 := Ahe_metc13/Vhe*Mr_metc13;
  Cgu_metc13 := Agu_metc13/Vgu;
  Xgu_metc13 := Agu_metc13*Mr_metc13;
  Mgu_metc13 := Agu_metc13/Vgu*Mr_metc13;
  Cre_metc13 := Are_metc13/Vre;
  Xre_metc13 := Are_metc13*Mr_metc13;
  Mre_metc13 := Are_metc13/Vre*Mr_metc13;
  Cki_metc13 := Aki_metc13/Vki;
  Xki_metc13 := Aki_metc13*Mr_metc13;
  Mki_metc13 := Aki_metc13/Vki*Mr_metc13;
  Csp_metc13 := Asp_metc13/Vsp;
  Xsp_metc13 := Asp_metc13*Mr_metc13;
  Msp_metc13 := Asp_metc13/Vsp*Mr_metc13;
  Cli_metc13 := Ali_metc13/Vli;
  Xli_metc13 := Ali_metc13*Mr_metc13;
  Mli_metc13 := Ali_metc13/Vli*Mr_metc13;
  Cve_metc13 := Ave_metc13/Vve;
  Xve_metc13 := Ave_metc13*Mr_metc13;
  Mve_metc13 := Ave_metc13/Vve*Mr_metc13;
  Car_metc13 := Aar_metc13/Var;
  Xar_metc13 := Aar_metc13*Mr_metc13;
  Mar_metc13 := Aar_metc13/Var*Mr_metc13;
  Cbo_metc13 := Abo_metc13/Vbo;
  Xbo_metc13 := Abo_metc13*Mr_metc13;
  Mbo_metc13 := Abo_metc13/Vbo*Mr_metc13;
  Clu_metc13 := Alu_metc13/Vlu;
  Xlu_metc13 := Alu_metc13*Mr_metc13;
  Mlu_metc13 := Alu_metc13/Vlu*Mr_metc13;
  Xurine_metc13 := Aurine_metc13*Mr_metc13;
  Xbody_apap := Xar_apap + Xbo_apap + Xhe_apap + Xgu_apap + Xki_apap + Xli_apap + Xlu_apap + Xsp_apap + Xre_apap + Xve_apap;
  Cpl_ve_apap := Cve_apap/BP_apap;
  Cli_free_apap := Cli_apap*fup_apap;
  Cki_free_apap := Cki_apap*fup_apap;
  Ki_apap := 1.386/ti_apap*3600 s_per_h;
  Che_apap := Ahe_apap/Vhe;
  Xhe_apap := Ahe_apap*Mr_apap;
  Mhe_apap := Ahe_apap/Vhe*Mr_apap;
  Cgu_apap := Agu_apap/Vgu;
  Xgu_apap := Agu_apap*Mr_apap;
  Mgu_apap := Agu_apap/Vgu*Mr_apap;
  Cre_apap := Are_apap/Vre;
  Xre_apap := Are_apap*Mr_apap;
  Mre_apap := Are_apap/Vre*Mr_apap;
  Cki_apap := Aki_apap/Vki;
  Xki_apap := Aki_apap*Mr_apap;
  Mki_apap := Aki_apap/Vki*Mr_apap;
  Csp_apap := Asp_apap/Vsp;
  Xsp_apap := Asp_apap*Mr_apap;
  Msp_apap := Asp_apap/Vsp*Mr_apap;
  Cli_apap := Ali_apap/Vli;
  Xli_apap := Ali_apap*Mr_apap;
  Mli_apap := Ali_apap/Vli*Mr_apap;
  Cve_apap := Ave_apap/Vve;
  Xve_apap := Ave_apap*Mr_apap;
  Mve_apap := Ave_apap/Vve*Mr_apap;
  Car_apap := Aar_apap/Var;
  Xar_apap := Aar_apap*Mr_apap;
  Mar_apap := Aar_apap/Var*Mr_apap;
  Cbo_apap := Abo_apap/Vbo;
  Xbo_apap := Abo_apap*Mr_apap;
  Mbo_apap := Abo_apap/Vbo*Mr_apap;
  Clu_apap := Alu_apap/Vlu;
  Xlu_apap := Alu_apap*Mr_apap;
  Mlu_apap := Alu_apap/Vlu*Mr_apap;
  Xurine_apap := Aurine_apap*Mr_apap;
  Xbreath_co2c13 := Abreath_co2c13*Mr_co2c13;
  Cbo_co2c13_fix := Abo_co2c13_fix/Vbo;
  Xbo_co2c13_fix := Abo_co2c13_fix*Mr_co2c13;
  CYP1A2MET_CLliv := CYP1A2MET_CL/fumic_metc13*MPPGL*Vli*F_PAR*60 min_per_h/(1000 mulitre_per_g);
  CO2FIX_CLliv := CO2FIX_HLM_CL*MPPGL*Vli*F_PAR*60 min_per_h/(1000 mulitre_per_g);
  APAPD_CLliv := APAPD_HLM_CL/fumic_apap*MPPGL*Vli*F_PAR*60 min_per_h/(1000 mulitre_per_g);

  // Rate rules:
  D_co2c13' = -Absorption_co2c13*Mr_co2c13;
  DIV_co2c13' = -Injection_co2c13*Mr_co2c13;
  cum_dose_co2c13' = Ri_co2c13*60 min_per_h;
  D_metc13' = -Absorption_metc13*Mr_metc13;
  DIV_metc13' = -Injection_metc13*Mr_metc13;
  cum_dose_metc13' = Ri_metc13*60 min_per_h;
  D_apap' = -Absorption_apap*Mr_apap;
  DIV_apap' = -Injection_apap*Mr_apap;
  cum_dose_apap' = Ri_apap*60 min_per_h;

  // Reactions:
  CYP1A2MET: Ali_metc13 => Ali_apap + Ali_co2c13; CYP1A2MET_CLliv*1 mmole_per_litre*(Cli_free_metc13/(Cli_free_metc13 + CYP1A2MET_Km_met));
  CO2FIX: Ali_co2c13 => ; CO2FIX_CLliv*1 mmole_per_litre*(Cli_co2c13/(Cli_co2c13 + CO2FIX_Km_co2));
  APAPD: Ali_apap => ; APAPD_CLliv*1 mmole_per_litre*(Cli_free_apap/(Cli_free_apap + APAPD_Km_apap));
  Exhalation_co2c13: Alu_co2c13 => Abreath_co2c13; KLU_EXCO2*60 min_per_h*Clu_co2c13*Vlu;
  Fixation_co2c13: Ave_co2c13 => Abo_co2c13_fix; KBO_FIXCO2*60 min_per_h*Cve_co2c13*Vve*(1 - Cbo_co2c13_fix/KBO_MAXCO2);
  Release_co2c13: Abo_co2c13_fix => Ave_co2c13; KBO_RELCO2*60 min_per_h*Cbo_co2c13_fix*Vve;
  Injection_co2c13: => Ave_co2c13; Ki_co2c13*DIV_co2c13/Mr_co2c13;
  Infusion_co2c13: => Ave_co2c13; Ri_co2c13/Mr_co2c13*60 min_per_h;
  Absorption_co2c13: => Agu_co2c13; Ka_co2c13*D_co2c13/Mr_co2c13*F_co2c13;
  vre_co2c13: Aki_co2c13 => Aurine_co2c13; CLrenal_co2c13*Cki_free_co2c13;
  ve_lu_co2c13: Ave_co2c13 => Alu_co2c13; Qlu*Cve_co2c13;
  lu_ar_co2c13: Alu_co2c13 => Aar_co2c13; Qlu*(Clu_co2c13/Kplu_co2c13)*BP_co2c13;
  ar_re_co2c13: Aar_co2c13 => Are_co2c13; Qre*Car_co2c13;
  re_ve_co2c13: Are_co2c13 => Ave_co2c13; Qre*(Cre_co2c13/Kpre_co2c13)*BP_co2c13;
  ar_bo_co2c13: Aar_co2c13 => Abo_co2c13; Qbo*Car_co2c13;
  bo_ve_co2c13: Abo_co2c13 => Ave_co2c13; Qbo*(Cbo_co2c13/Kpbo_co2c13)*BP_co2c13;
  ar_gu_co2c13: Aar_co2c13 => Agu_co2c13; Qgu*Car_co2c13;
  gu_li_co2c13: Agu_co2c13 => Ali_co2c13; Qgu*(Cgu_co2c13/Kpgu_co2c13)*BP_co2c13;
  ar_he_co2c13: Aar_co2c13 => Ahe_co2c13; Qhe*Car_co2c13;
  he_ve_co2c13: Ahe_co2c13 => Ave_co2c13; Qhe*(Che_co2c13/Kphe_co2c13)*BP_co2c13;
  ar_ki_co2c13: Aar_co2c13 => Aki_co2c13; Qki*Car_co2c13;
  ki_ve_co2c13: Aki_co2c13 => Ave_co2c13; Qki*(Cki_co2c13/Kpki_co2c13)*BP_co2c13;
  ar_sp_co2c13: Aar_co2c13 => Asp_co2c13; Qsp*Car_co2c13;
  sp_li_co2c13: Asp_co2c13 => Ali_co2c13; Qsp*(Csp_co2c13/Kpsp_co2c13)*BP_co2c13;
  ar_li_co2c13: Aar_co2c13 => Ali_co2c13; Qha*Car_co2c13;
  li_ve_co2c13: Ali_co2c13 => Ave_co2c13; Qh*(Cli_co2c13/Kpli_co2c13)*BP_co2c13;
  Injection_metc13: => Ave_metc13; Ki_metc13*DIV_metc13/Mr_metc13;
  Infusion_metc13: => Ave_metc13; Ri_metc13/Mr_metc13*60 min_per_h;
  Absorption_metc13: => Agu_metc13; Ka_metc13*D_metc13/Mr_metc13*F_metc13;
  vre_metc13: Aki_metc13 => Aurine_metc13; CLrenal_metc13*Cki_free_metc13;
  ve_lu_metc13: Ave_metc13 => Alu_metc13; Qlu*Cve_metc13;
  lu_ar_metc13: Alu_metc13 => Aar_metc13; Qlu*(Clu_metc13/Kplu_metc13)*BP_metc13;
  ar_re_metc13: Aar_metc13 => Are_metc13; Qre*Car_metc13;
  re_ve_metc13: Are_metc13 => Ave_metc13; Qre*(Cre_metc13/Kpre_metc13)*BP_metc13;
  ar_bo_metc13: Aar_metc13 => Abo_metc13; Qbo*Car_metc13;
  bo_ve_metc13: Abo_metc13 => Ave_metc13; Qbo*(Cbo_metc13/Kpbo_metc13)*BP_metc13;
  ar_gu_metc13: Aar_metc13 => Agu_metc13; Qgu*Car_metc13;
  gu_li_metc13: Agu_metc13 => Ali_metc13; Qgu*(Cgu_metc13/Kpgu_metc13)*BP_metc13;
  ar_he_metc13: Aar_metc13 => Ahe_metc13; Qhe*Car_metc13;
  he_ve_metc13: Ahe_metc13 => Ave_metc13; Qhe*(Che_metc13/Kphe_metc13)*BP_metc13;
  ar_ki_metc13: Aar_metc13 => Aki_metc13; Qki*Car_metc13;
  ki_ve_metc13: Aki_metc13 => Ave_metc13; Qki*(Cki_metc13/Kpki_metc13)*BP_metc13;
  ar_sp_metc13: Aar_metc13 => Asp_metc13; Qsp*Car_metc13;
  sp_li_metc13: Asp_metc13 => Ali_metc13; Qsp*(Csp_metc13/Kpsp_metc13)*BP_metc13;
  ar_li_metc13: Aar_metc13 => Ali_metc13; Qha*Car_metc13;
  li_ve_metc13: Ali_metc13 => Ave_metc13; Qh*(Cli_metc13/Kpli_metc13)*BP_metc13;
  Injection_apap: => Ave_apap; Ki_apap*DIV_apap/Mr_apap;
  Infusion_apap: => Ave_apap; Ri_apap/Mr_apap*60 min_per_h;
  Absorption_apap: => Agu_apap; Ka_apap*D_apap/Mr_apap*F_apap;
  vre_apap: Aki_apap => Aurine_apap; CLrenal_apap*Cki_free_apap;
  ve_lu_apap: Ave_apap => Alu_apap; Qlu*Cve_apap;
  lu_ar_apap: Alu_apap => Aar_apap; Qlu*(Clu_apap/Kplu_apap)*BP_apap;
  ar_re_apap: Aar_apap => Are_apap; Qre*Car_apap;
  re_ve_apap: Are_apap => Ave_apap; Qre*(Cre_apap/Kpre_apap)*BP_apap;
  ar_bo_apap: Aar_apap => Abo_apap; Qbo*Car_apap;
  bo_ve_apap: Abo_apap => Ave_apap; Qbo*(Cbo_apap/Kpbo_apap)*BP_apap;
  ar_gu_apap: Aar_apap => Agu_apap; Qgu*Car_apap;
  gu_li_apap: Agu_apap => Ali_apap; Qgu*(Cgu_apap/Kpgu_apap)*BP_apap;
  ar_he_apap: Aar_apap => Ahe_apap; Qhe*Car_apap;
  he_ve_apap: Ahe_apap => Ave_apap; Qhe*(Che_apap/Kphe_apap)*BP_apap;
  ar_ki_apap: Aar_apap => Aki_apap; Qki*Car_apap;
  ki_ve_apap: Aki_apap => Ave_apap; Qki*(Cki_apap/Kpki_apap)*BP_apap;
  ar_sp_apap: Aar_apap => Asp_apap; Qsp*Car_apap;
  sp_li_apap: Asp_apap => Ali_apap; Qsp*(Csp_apap/Kpsp_apap)*BP_apap;
  ar_li_apap: Aar_apap => Ali_apap; Qha*Car_apap;
  li_ve_apap: Ali_apap => Ave_apap; Qh*(Cli_apap/Kpli_apap)*BP_apap;

  // Unit definitions:
  unit h = 3600 second;
  unit s = second;
  unit kg = 1000 gram;
  unit m = metre;
  unit m2 = metre^2;
  unit per_h = 1 / (3600 second);
  unit per_min = 1 / (60 second);
  unit cm = 0.01 metre;
  unit mg = 1e-3 gram;
  unit mmole = 1e-3 mole;
  unit mg_per_litre = 1e-3 gram / litre;
  unit mg_per_g = 1e-3 gram / gram;
  unit mg_per_h = 1e-3 gram / (3600 second);
  unit mmole_per_h = 1e-3 mole / (3600 second);
  unit mmole_per_litre = 1e-3 mole / litre;
  unit mM = 1e-3 mole / litre;
  unit litre_per_h = litre / (3600 second);
  unit litre_per_kg = litre / (1000 gram);
  unit mulitre_per_min_mg = 1e-6 litre / (60 second * 1e-3 gram);
  unit g_per_mole = gram / mole;
  unit m2_per_kg = metre^2 / (1000 gram);
  unit mug_per_hkg = 1e-6 gram / (3600 mole * 1000 gram);
  unit mg_per_min = 1e-3 gram / (60 second);
  unit mmole_per_min = 1e-3 mole / (60 second);
  unit mmole_per_minkg = 1e-3 mole / (60 second * 1000 gram);
  unit mmole_per_hm2 = 1e-3 mole / (3600 second * metre^2);
  unit ml = 1e-3 litre;
  unit ml_per_s = 1e-3 litre / second;
  unit ml_per_skg = 1e-3 litre / (second * 1000 gram);
  unit min_per_h = 60 second / (3600 second);
  unit s_per_min = 60 second / (3600 second);
  unit s_per_h = second / (3600 second);
  unit mulitre_per_g = 1e-6 litre / gram;
  unit ml_per_litre = 1e-3 litre / litre;
end
